vr 12 dec 2025 13:33:43 CET
;; 1. Based on: run01
;; 2. Description: PMX001 One Compartment
;; x1. Joshua I., Ali K.
;; 2025-12-09
$PROBLEM    PMX001 One Compartment
$INPUT      DUMMY=DROP ID TIME WEEK DOSE=DROP RATE CONC=DV ADA BW ALB
            SEX AGE CREAT COL EVID BLQ AMT
$DATA      dataset_clean.csv IGNORE=@
$SUBROUTINE ADVAN13 ; general nonlinear model
            TOL=9 ; tolerance for $DES,higher TOL: more accurate,but slower computation

; TOL=9 -> DES will aim for accuracy of 1E-9 for each integration step
$MODEL      NCOMP=1 ; number of compartments
            COMP=(DOSE,DEFDOSE,DEFOBS) ; first (central) compartment
$PK
TVCL = THETA(1)
  CL = TVCL * EXP(ETA(1))
 TVV = THETA(2)
   V = TVV  * EXP(ETA(2))
 K10 = CL/V
  S1 = V ; scale prediction based on DOSE (mmol) and DV (mmol/L)

$DES DADT(1) = -K10*A(1)  ; ODE for central compartment

$ERROR
IPRED = F
LLOQ = 1

PROP = IPRED*THETA(3)
ADD = THETA(4)
IF (BLQ.EQ.1) ADD = ADD + LLOQ

W = SQRT(ADD**2+PROP**2)

IF (W.LE.0.000001) W=0.000001 ; Protective code

IRES=CONC-IPRED
IWRES=IRES/W

Y = IPRED + W*ERR(1)

$THETA  (0,0.012) ; CL [1]
 (0,4.45) ; V [2,3]
 (0,0.2,0.5) ; PROP error ()
 (0,0.2,10) ; ADD (mg/L)
$OMEGA  0.05  ; IIV/BSV CL, fix to 0 to exclude
 0.05  ;  IIV/BSV V
$SIGMA  1  FIX  ; errors already adjusted under $ERROR as THETAs
 ; residual variability
$ESTIMATION METHOD=1 INTERACTION ; FOCE-I
            MAXEVAL=9999 SIG=3 PRINT=5
$COVARIANCE PRINT=E UNCONDITIONAL MATRIX=S
 ; output table for standard outcomes
$TABLE      ID TIME DV EVID PRED IPRED WRES IWRES RES IRES CWRES
            NOPRINT ONEHEADER FILE=run01_sdtab
 ; output table for PK parameters
$TABLE      ID CL V K10 NOPRINT NOAPPEND ONEHEADER FILE=run01_patab
 ; output table for categorical covariates
$TABLE      ID ADA SEX COL NOPRINT NOAPPEND ONEHEADER FILE=run01_catab
 ; output table for continuous covariates
$TABLE      ID BW ALB AGE CREAT NOPRINT NOAPPEND ONEHEADER
            FILE=run01_cotab
;; REFERENCES

;; 1] https://www.ncbi.nlm.nih.gov/books/NBK557889/

;; 2] https://pmc.ncbi.nlm.nih.gov/articles/PMC8301575/

;; 3] https://ascpt.onlinelibrary.wiley.com/doi/abs/10.1016/j.clpt.2004.12.212

NM-TRAN MESSAGES
 WARNINGS AND ERRORS (IF ANY) FOR PROBLEM    1
 (WARNING  2) NM-TRAN INFERS THAT THE DATA ARE POPULATION.
Note: Analytical 2nd Derivatives are constructed in FSUBS but are never used.
      You may insert $ABBR DERIV2=NO after the first $PROB to save FSUBS construction and compilation time

1NONLINEAR MIXED EFFECTS MODEL PROGRAM (NONMEM) VERSION 7.6.0 (nm760)
 ORIGINALLY DEVELOPED BY STUART BEAL, LEWIS SHEINER, AND ALISON BOECKMANN
 CURRENT DEVELOPERS ARE ROBERT BAUER, ICON DEVELOPMENT SOLUTIONS,
 AND ALISON BOECKMANN. IMPLEMENTATION, EFFICIENCY, AND STANDARDIZATION
 PERFORMED BY NOUS INFOSYSTEMS.
 PROBLEM NO.:         1
 PMX001 One Compartment
 TOT. NO. OF OBS RECS:     2801
 TOT. NO. OF INDIVIDUALS:       75
 GENERAL NONLINEAR KINETICS MODEL WITH STIFF/NONSTIFF EQUATIONS (LSODA, ADVAN13)
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 #TBLN:      1
 #METH: First Order Conditional Estimation with Interaction
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
 #TERM:
0MINIMIZATION TERMINATED
 DUE TO PROXIMITY OF LAST ITERATION EST. TO A VALUE
 AT WHICH THE OBJ. FUNC. IS INFINITE (ERROR=136)
0AT THE LAST COMPUTED INFINITE VALUE OF THE OBJ. FUNCT.:
 ERROR IN NCONTR WITH INDIVIDUAL      14   ID= 1.40000000000000E+01
 NUMERICAL HESSIAN OF OBJ. FUNC. FOR COMPUTING CONDITIONAL ESTIMATE
 IS NON POSITIVE DEFINITE
 THETA=
  1.31E+00   3.77E+10   4.15E-01   2.00E-03

 NO. OF FUNCTION EVALUATIONS USED:      211
 NO. OF SIG. DIGITS UNREPORTABLE
0PARAMETER ESTIMATE IS NEAR ITS BOUNDARY

 ETABAR IS THE ARITHMETIC MEAN OF THE ETA-ESTIMATES,
 AND THE P-VALUE IS GIVEN FOR THE NULL HYPOTHESIS THAT THE TRUE MEAN IS 0.

 ETABAR:        -1.2450E-02 -2.2723E+01
 SE:             8.6945E-02  5.7247E-02
 N:                      75          75

 P VAL.:         8.8614E-01  0.0000E+00

 ETASHRINKSD(%)  1.3787E+01  2.3961E+01
 ETASHRINKVR(%)  2.5673E+01  4.2180E+01
 EBVSHRINKSD(%)  3.1714E-01  3.6188E-04
 EBVSHRINKVR(%)  6.3327E-01  7.2376E-04
 RELATIVEINF(%)  9.9367E+01  9.9999E+01
 EPSSHRINKSD(%)  2.8539E+01
 EPSSHRINKVR(%)  4.8934E+01


 TOTAL DATA POINTS NORMALLY DISTRIBUTED (N):         2801
 N*LOG(2PI) CONSTANT TO OBJECTIVE FUNCTION:    5147.8936630125763
 OBJECTIVE FUNCTION VALUE WITHOUT CONSTANT:    16217.002343477554
 OBJECTIVE FUNCTION VALUE WITH CONSTANT:       21364.896006490129
 REPORTED OBJECTIVE FUNCTION DOES NOT CONTAIN CONSTANT

 TOTAL EFFECTIVE ETAS (NIND*NETA):                           150


 #TERE:
 Elapsed estimation  time in seconds:  1595.79
0PROGRAM TERMINATED BY OBJ
 ERROR IN NCONTR WITH INDIVIDUAL      16   ID= 1.60000000000000E+01
 NUMERICAL HESSIAN OF OBJ. FUNC. FOR COMPUTING CONDITIONAL ESTIMATE
 IS NON POSITIVE DEFINITE
0S MATRIX ALGORITHMICALLY SINGULAR
0COVARIANCE MATRIX UNOBTAINABLE
 Elapsed covariance  time in seconds:   116.79
 Elapsed postprocess time in seconds:    10.18

 ********************               FIRST ORDER CONDITIONAL ESTIMATION WITH INTERACTION              ********************
 #OBJT:**************                       MINIMUM VALUE OF OBJECTIVE FUNCTION                      ********************
 #OBJV:********************************************         16217.002       *********************************************

 ********************               FIRST ORDER CONDITIONAL ESTIMATION WITH INTERACTION              ********************
 ********************                             FINAL PARAMETER ESTIMATE                           ********************

 THETA - VECTOR OF FIXED EFFECTS PARAMETERS   *********
         TH 1      TH 2      TH 3      TH 4
         1.31E+00  3.77E+10  4.15E-01  2.00E-03

 OMEGA - COV MATRIX FOR RANDOM EFFECTS - ETAS  ********
         ETA1      ETA2
 ETA1
+        7.63E-01
 ETA2
+        0.00E+00  8.93E+02

 SIGMA - COV MATRIX FOR RANDOM EFFECTS - EPSILONS  ****
         EPS1
 EPS1
+        1.00E+00

 OMEGA - CORR MATRIX FOR RANDOM EFFECTS - ETAS  *******
         ETA1      ETA2
 ETA1
+        8.73E-01
 ETA2
+        0.00E+00  2.99E+01

 SIGMA - CORR MATRIX FOR RANDOM EFFECTS - EPSILONS  ***
         EPS1
 EPS1
+        1.00E+00
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 Elapsed finaloutput time in seconds:     1.08
 #CPUT: Total CPU Time in Seconds,     1697.524
