ma 22 dec 2025 16:20:40 CET
;; 1. Based on: run03
;; 2. Description: PMX001 2CMT MM M7+
;; x1. Joshua I., Ali K.
;; 2025-12-22
$PROBLEM    PMX001 One Compartment
$INPUT      DUMMY=DROP ID TIME WEEK DOSE=DROP RATE CONC=DV ADA BW ALB
            SEX AGE CREAT COL EVID BLQ AMT
$DATA      dataset_clean.csv IGNORE=@
$SUBROUTINE ADVAN13 ; general nonlinear model
            TOL=9 ; tolerance for $DES,higher TOL: more accurate,but slower computation

; TOL=9 -> DES will aim for accuracy of 1E-9 for each integration step
$MODEL      NCOMP=2 ; number of compartments
            COMP=(DOSE,DEFDOSE,DEFOBS) ; first (central) compartment
            COMP=(PERIPH) ; second (peripheral) compartment
$PK
TVVMAX = THETA(1)
  VMAX = TVVMAX * EXP(ETA(1))
  TVKM = THETA(2)
    KM = TVKM * EXP(ETA(2))
  TVV1 = THETA(3)
    V1 = TVV1 * EXP(ETA(3))
  TVV2 = THETA(4)
    V2 = TVV2 * EXP(ETA(4))
   TVQ = THETA(5)
     Q = TVQ
   K12 = Q/V1
   K21 = Q/V2
    S1 = V1 ; scale prediction based on DOSE (mmol) and DV (mmol/L)
    S2 = V2

$DES DADT(1) = -VMAX*A(1)/(KM*V1 +A(1)) -K12*A(1) +K21*A(2) ; ODE for central    compartment
     DADT(2) =                           K12*A(1) -K21*A(2) ; ODE for peripheral compartment

$ERROR
IPRED = F
LLOQ = 1

PROP = IPRED*THETA(6)
ADD = THETA(7)
IF (BLQ.EQ.1) ADD = ADD + LLOQ

W = SQRT(ADD**2+PROP**2)

IF (W.LE.0.000001) W=0.000001 ; Protective code

IRES=CONC-IPRED
IWRES=IRES/W

Y = IPRED + W*ERR(1)

$THETA  (0,0.75) ; VMAX [2]
 (0,0.04) ; KM [2]
 (0,3.23) ; V1 [5]
 (0,3.68) ; V2 [5]
 (0,0.02) ; Q  [5]
 (0,0.2,0.5) ; PROP error ()
 (0,0.2,10) ; ADD (mg/L)
$OMEGA  0.05  ;   IIV VMAX
 0.05  ;     IIV KM
 0.05  ; IIV V1 [5]
 0.05  ; IIV V2 [5]
$SIGMA  1  FIX  ; errors already adjusted under $ERROR as THETAs
 ; residual variability
$ESTIMATION METHOD=1 INTERACTION ; FOCE-I
            MAXEVAL=9999 SIG=3 PRINT=5
$COVARIANCE PRINT=E UNCONDITIONAL MATRIX=S
 ; output table for standard outcomes
$TABLE      ID TIME DV EVID PRED IPRED WRES IWRES RES IRES CWRES
            NOPRINT ONEHEADER FILE=run04_sdtab
 ; output table for PK parameters
$TABLE      ID VMAX KM V1 V2 Q K12 K21 NOPRINT NOAPPEND ONEHEADER
            FILE=run04_patab
 ; output table for categorical covariates
$TABLE      ID ADA SEX COL NOPRINT NOAPPEND ONEHEADER FILE=run04_catab
 ; output table for continuous covariates
$TABLE      ID BW ALB AGE CREAT NOPRINT NOAPPEND ONEHEADER
            FILE=run04_cotab
;; REFERENCES

;; 1] https://www.ncbi.nlm.nih.gov/books/NBK557889/

;; 2] https://www.tandfonline.com/doi/pdf/10.1080/19420862.2025.2512217?needAccess=true

;; 3] https://pmc.ncbi.nlm.nih.gov/articles/PMC8301575/

;; 4] https://ascpt.onlinelibrary.wiley.com/doi/abs/10.1016/j.clpt.2004.12.212

;; 5] https://accp1.onlinelibrary.wiley.com/doi/10.1177/0091270006298188

NM-TRAN MESSAGES
 WARNINGS AND ERRORS (IF ANY) FOR PROBLEM    1
 (WARNING  2) NM-TRAN INFERS THAT THE DATA ARE POPULATION.
Note: Analytical 2nd Derivatives are constructed in FSUBS but are never used.
      You may insert $ABBR DERIV2=NO after the first $PROB to save FSUBS construction and compilation time

1NONLINEAR MIXED EFFECTS MODEL PROGRAM (NONMEM) VERSION 7.6.0 (nm760)
 ORIGINALLY DEVELOPED BY STUART BEAL, LEWIS SHEINER, AND ALISON BOECKMANN
 CURRENT DEVELOPERS ARE ROBERT BAUER, ICON DEVELOPMENT SOLUTIONS,
 AND ALISON BOECKMANN. IMPLEMENTATION, EFFICIENCY, AND STANDARDIZATION
 PERFORMED BY NOUS INFOSYSTEMS.
 PROBLEM NO.:         1
 PMX001 One Compartment
 TOT. NO. OF OBS RECS:     2801
 TOT. NO. OF INDIVIDUALS:       75
 GENERAL NONLINEAR KINETICS MODEL WITH STIFF/NONSTIFF EQUATIONS (LSODA, ADVAN13)
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 #TBLN:      1
 #METH: First Order Conditional Estimation with Interaction
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
 #TERM:
0MINIMIZATION TERMINATED
 DUE TO PROXIMITY OF NEXT ITERATION EST. TO A VALUE
 AT WHICH THE OBJ. FUNC. IS INFINITE
0AT THE LAST COMPUTED INFINITE VALUE OF THE OBJ. FUNCT.:
 ERROR IN NCONTR WITH INDIVIDUAL      40   ID= 4.00000000000000E+01
 NUMERICAL HESSIAN OF OBJ. FUNC. FOR COMPUTING CONDITIONAL ESTIMATE
 IS NON POSITIVE DEFINITE
 THETA=
  4.16E+01   6.37E+00   4.20E+00   5.11E+00   1.47E+00   2.15E-01   2.00E-03

 NO. OF FUNCTION EVALUATIONS USED:     1629
 NO. OF SIG. DIGITS UNREPORTABLE
0PARAMETER ESTIMATE IS NEAR ITS BOUNDARY

 ETABAR IS THE ARITHMETIC MEAN OF THE ETA-ESTIMATES,
 AND THE P-VALUE IS GIVEN FOR THE NULL HYPOTHESIS THAT THE TRUE MEAN IS 0.

 ETABAR:         3.1312E-03 -1.2903E-06 -2.0305E-03 -3.9524E-03
 SE:             3.6727E-02  1.6521E-06  6.7891E-02  1.2475E-02
 N:                      75          75          75          75

 P VAL.:         9.3206E-01  4.3480E-01  9.7614E-01  7.5138E-01

 ETASHRINKSD(%)  4.6720E-01  9.9358E+01  4.0058E-01  3.3383E+01
 ETASHRINKVR(%)  9.3222E-01  9.9996E+01  7.9956E-01  5.5621E+01
 EBVSHRINKSD(%)  4.9071E-01  9.9521E+01  3.9726E-01  3.3339E+01
 EBVSHRINKVR(%)  9.7900E-01  9.9998E+01  7.9294E-01  5.5563E+01
 RELATIVEINF(%)  7.4357E+01  1.3965E-03  9.9196E+01  3.3135E+01
 EPSSHRINKSD(%)  1.0605E+01
 EPSSHRINKVR(%)  2.0085E+01


 TOTAL DATA POINTS NORMALLY DISTRIBUTED (N):         2801
 N*LOG(2PI) CONSTANT TO OBJECTIVE FUNCTION:    5147.8936630125763
 OBJECTIVE FUNCTION VALUE WITHOUT CONSTANT:    13724.125721397584
 OBJECTIVE FUNCTION VALUE WITH CONSTANT:       18872.019384410160
 REPORTED OBJECTIVE FUNCTION DOES NOT CONTAIN CONSTANT

 TOTAL EFFECTIVE ETAS (NIND*NETA):                           300


 #TERE:
 Elapsed estimation  time in seconds:  3175.80
0S MATRIX ALGORITHMICALLY SINGULAR
0COVARIANCE MATRIX UNOBTAINABLE
 Elapsed covariance  time in seconds:    34.22
 Elapsed postprocess time in seconds:     2.66

 ********************               FIRST ORDER CONDITIONAL ESTIMATION WITH INTERACTION              ********************
 #OBJT:**************                       MINIMUM VALUE OF OBJECTIVE FUNCTION                      ********************
 #OBJV:********************************************         13724.126       *********************************************

 ********************               FIRST ORDER CONDITIONAL ESTIMATION WITH INTERACTION              ********************
 ********************                             FINAL PARAMETER ESTIMATE                           ********************

 THETA - VECTOR OF FIXED EFFECTS PARAMETERS   *********
         TH 1      TH 2      TH 3      TH 4      TH 5      TH 6      TH 7
         4.15E+01  6.38E+00  4.21E+00  5.11E+00  1.47E+00  2.15E-01  2.00E-03

 OMEGA - COV MATRIX FOR RANDOM EFFECTS - ETAS  ********
         ETA1      ETA2      ETA3      ETA4
 ETA1
+        1.02E-01
 ETA2
+        0.00E+00  5.00E-06
 ETA3
+        0.00E+00  0.00E+00  3.48E-01
 ETA4
+        0.00E+00  0.00E+00  0.00E+00  2.63E-02

 SIGMA - COV MATRIX FOR RANDOM EFFECTS - EPSILONS  ****
         EPS1
 EPS1
+        1.00E+00

 OMEGA - CORR MATRIX FOR RANDOM EFFECTS - ETAS  *******
         ETA1      ETA2      ETA3      ETA4
 ETA1
+        3.20E-01
 ETA2
+        0.00E+00  2.24E-03
 ETA3
+        0.00E+00  0.00E+00  5.90E-01
 ETA4
+        0.00E+00  0.00E+00  0.00E+00  1.62E-01

 SIGMA - CORR MATRIX FOR RANDOM EFFECTS - EPSILONS  ***
         EPS1
 EPS1
+        1.00E+00
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 Elapsed finaloutput time in seconds:     0.32
 #CPUT: Total CPU Time in Seconds,     3210.031
